*RESTART, READ

*STEP, NLGEOM, INC=1000000
*DYNAMIC
 0.01, 100., 0.00005, 0.2

*CLOAD
 Ninterface, 1, 0.0
 Ninterface, 2, 0.0
 Ninterface, 3, 0.0

*NODE FILE,OUTPUT=2D,FREQUENCY=10
 U,
*EL FILE
 E, ME, S

*END STEP
