*RESTART,READ

*STEP, NLGEOM, INC=1000000
*DYNAMIC,ALPHA=-0.3
 0.0001, 1., 0.000001, 0.1

*BOUNDARY, AMPLITUDE=A1
*INCLUDE, INPUT=BCs_EDGE_TOP.nam
*INCLUDE, INPUT=BCs_EDGE_BOTTOM.nam

*CLOAD
 Ninterface, 1, 0.0
 Ninterface, 2, 0.0
 Ninterface, 3, 0.0

*NODE FILE,OUTPUT=2D,FREQUENCY=10
 U,
*EL FILE
 E, ME, S
*END STEP
